ORIGIN := 1
Xw := [0, 50]
Yw := [0, 30]
m := 5  # -число подобластей
X :=
    for i ∈ 1 .. cols(Xw)
        for j ∈ 1 .. cols(Xw)*cols(Yw)
            k ← trunc((j - 1)/cols(Yw)) + 1
            X[j] ← transpose(Xw)[k]
        V ← stack(V, transpose(Yw))
    for i ∈ 2 .. cols(Xw)*cols(Yw) + 1
        J[i - 1] ← V[i]
    augment(X, J)
SOD :=
    for i ∈ 1 .. 5
        for j ∈ 1 .. m
            S[i, 1] ← i
            S[i, 2] ← i
            S[i, 3] ← S[i, 2] + 4
            S[i, 4] ← S[i, 3] + 1
            S[i, 5] ← S[i, 4] - 4
    S
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X = [0, 0; 0, 30; 50, 0; 50, 30]
SOD = [1, 1, 5, 6, 2; 2, 2, 6, 7, 3; 3, 3, 7, 8, 4; 4, 4, 8, 9, 5; 5, 5, 9, 10, 6]
SOD := [1, 1, 5, 6, 2; 2, 2, 6, 7, 3; 3, 3, 7, 8, 4; 4, 5, 9, 10, 6; 5, 7, 11, 12, 8]
FX :=
    for i ∈ 1 .. m
        for j ∈ 1 .. 4
            FXS[i, j] ← X[:, 1][SOD[i, j + 1]]
            FXS[i, 5] ← FXS[i, 1]
            FXS[i, 6] ← sqrt(-1)
    FXS  # error: This array index is invalid for this array.
FY :=
    for i ∈ 1 .. m
        for j ∈ 1 .. 4
            FYS[i, j] ← X[:, 2][SOD[i, j + 1]]
            FYS[i, 5] ← FYS[i, 1]
            FYS[i, 6] ← sqrt(-1)
    FYS  # error: This array index is invalid for this array.
X = [0, 0; 0, 30; 50, 0; 50, 30]
Prog(M) :=
    k ← 1
    for i ∈ 1 .. rows(M)
        for j ∈ 1 .. cols(M)
            V[k] ← M[i, j]
            k ← k + 1
    V
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nodes := READPRN("nodes.txt")
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(145 - 150)^2 + (41.33975 - 50)^2 = 99.9999
elements := READPRN("elements.txt")
m := rows(elements) = 78  # - число элементов
n := rows(nodes) = 104
ORIGIN := 1
FX :=
    for i ∈ 1 .. m
        for j ∈ 1 .. 4
            FX[i, j] ← nodes[:, 2][elements[i, j + 1]]
            FX[i, 4] ← FX[i, 3] if j == 3
            FX[i, 5] ← FX[i, 1]
            FX[i, 6] ← sqrt(-1)
    FX
FY :=
    for i ∈ 1 .. m
        for j ∈ 1 .. 4
            FY[i, j] ← nodes[:, 3][elements[i, j + 1]]
            FY[i, 4] ← FY[i, 3] if j == 3
            FY[i, 5] ← FY[i, 1]
            FY[i, 6] ← sqrt(-1)
    FY
nodes = [
    1, 0, 0;
    2, 47.643, 0;
    3, 95.286, 0;
    4, 142.929, 0;
    5, 145.286, 0;
    6, 147.643, 0;
    7, 150, 0;
    8, 0, 16.4798;
    9, 47.643, 16.4798;
    10, 95.286, 16.4798
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]
elements = [
    1, 1, 2, 9, 8;
    2, 2, 3, 10, 9;
    3, 3, 4, 11, 10;
    4, 4, 5, 12, 11;
    5, 5, 6, 13, 12;
    6, 6, 7, 14, 13;
    7, 8, 9, 16, 15;
    8, 9, 10, 17, 16;
    9, 10, 11, 18, 17;
    10, 11, 12, 19, 18
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]
Prog(M) :=
    k ← 1
    for i ∈ 1 .. rows(M)
        for j ∈ 1 .. cols(M)
            G[k] ← M[i, j]
            k ← k + 1
    G
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nodes1 := READPRN("nodes.txt")
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nodes1 = [
    1, 0, 0;
    2, 47.643, 0;
    3, 95.286, 0;
    4, 142.929, 0;
    5, 145.286, 0;
    6, 147.643, 0;
    7, 150, 0;
    8, 0, 16.4798;
    9, 47.643, 16.4798;
    10, 95.286, 16.4798
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]
elements1 := READPRN("elements.txt")
m1 := rows(elements1) = 78  # - число элементов после удаления подобласти
rows(nodes1) = 104  # - число узлов после удаления подобласти
ORIGIN := 1
FX :=
    for i ∈ 1 .. m1
        for j ∈ 1 .. 4
            FX[i, j] ← nodes1[:, 2][elements1[i, j + 1]]
            FX[i, 4] ← FX[i, 1] if j == 3
            FX[i, 5] ← FX[i, 1]
            FX[i, 6] ← sqrt(-1)
    FX
FY :=
    for i ∈ 1 .. m1
        for j ∈ 1 .. 4
            FY[i, j] ← nodes1[:, 3][elements1[i, j + 1]]
            FY[i, 4] ← FY[i, 3] if j == 3
            FY[i, 5] ← FY[i, 1]
            FY[i, 6] ← sqrt(-1)
    FY
nodes1 = [
    1, 0, 0;
    2, 47.643, 0;
    3, 95.286, 0;
    4, 142.929, 0;
    5, 145.286, 0;
    6, 147.643, 0;
    7, 150, 0;
    8, 0, 16.4798;
    9, 47.643, 16.4798;
    10, 95.286, 16.4798
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]
elements1 = [
    1, 1, 2, 9, 8;
    2, 2, 3, 10, 9;
    3, 3, 4, 11, 10;
    4, 4, 5, 12, 11;
    5, 5, 6, 13, 12;
    6, 6, 7, 14, 13;
    7, 8, 9, 16, 15;
    8, 9, 10, 17, 16;
    9, 10, 11, 18, 17;
    10, 11, 12, 19, 18
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]
Prog(M) :=
    k ← 1
    for i ∈ 1 .. rows(M)
        for j ∈ 1 .. cols(M)
            G[k] ← M[i, j]
            k ← k + 1
    G
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FX =  # no stored result
FY =  # no stored result
global_stiffness_matrix := READPRN("out_stiffness_matrix.txt")
global_load_vector := READPRN("out_loads_vec.txt")
GSM := global_stiffness_matrix
GLV := global_load_vector
# сумма элементов строки или столбца матрицы должна быть равна нулю
sum :=
    for i ∈ 1 .. rows(GSM)
        sum[i] ← sum(GSM[i, j], j = 1 .. cols(GSM))
    sum
GLV =  # no stored result
sum =  # no stored result
sum(GLV[i], i = 1 .. rows(GLV)) = -30000  # Н
u := READPRN("u.txt")  # вектор перемещений, полученный с помощью PARDISO
# Аналитика:
a := transpose(Xw)[cols(Xw)] - transpose(Xw)[1] = 50  # мм
b := transpose(Yw)[cols(Yw)] - transpose(Yw)[1] = 30  # мм
q := 1000  # Н/мм
t := 3  # мм
E := 2.1*10^5  # МПа
σ := q*b/(t*b) = 333.333  # МПа
|GSM| = Infinity
disp := GSM^-1*GLV
scale := 100
u_an := a*σ/E = 0.0793651
NEW_COORDS :=
    n ← rows(nodes)
    for i ∈ 1 .. n
        res[i, 2] ← nodes[i, 2] + scale*u[2*i - 1]
        res[i, 3] ← nodes[i, 3] + scale*u[2*i - 0]
        res[i, 1] ← i
    res
NEW_COORDS = [
    1, -7.87069, 0.714392;
    2, 40.566, 0.715182;
    3, 89.0026, 0.716415;
    4, 137.438, 0.718483;
    5, 140.586, 0.72133;
    6, 143.729, 0.723603;
    7, 146.862, 0.720685;
    8, -2.37755, 17.1807;
    9, 46.0091, 17.1181;
    10, 94.3654, 16.9608
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]
disp =  # no stored result
u =  # no stored result
FXn :=
    for i ∈ 1 .. m1
        for j ∈ 1 .. 4
            FX[i, j] ← NEW_COORDS[:, 2][elements[i, j + 1]]
            FX[i, 4] ← FX[i, 3] if j == 3
            FX[i, 5] ← FX[i, 1]
            FX[i, 6] ← sqrt(-1)
    FX
FYn :=
    for i ∈ 1 .. m1
        for j ∈ 1 .. 4
            FY[i, j] ← NEW_COORDS[:, 3][elements1[i, j + 1]]
            FY[i, 4] ← FY[i, 3] if j == 3
            FY[i, 5] ← FY[i, 1]
            FY[i, 6] ← sqrt(-1)
    FY
Prog(M) :=
    k ← 1
    for i ∈ 1 .. rows(M)
        for j ∈ 1 .. cols(M)
            G[k] ← M[i, j]
            k ← k + 1
    G
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nodes = [
    1, 0, 0;
    2, 47.643, 0;
    3, 95.286, 0;
    4, 142.929, 0;
    5, 145.286, 0;
    6, 147.643, 0;
    7, 150, 0;
    8, 0, 16.4798;
    9, 47.643, 16.4798;
    10, 95.286, 16.4798
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]
NEW_COORDS = [
    1, -7.87069, 0.714392;
    2, 40.566, 0.715182;
    3, 89.0026, 0.716415;
    4, 137.438, 0.718483;
    5, 140.586, 0.72133;
    6, 143.729, 0.723603;
    7, 146.862, 0.720685;
    8, -2.37755, 17.1807;
    9, 46.0091, 17.1181;
    10, 94.3654, 16.9608
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]
FX =  # no stored result
FXn =  # no stored result
FY =  # no stored result
FYn =  # no stored result
(|u[1]| - |u[3]|)/|u[1]|*100 = 10.0841
